<?xml version="1.0"?>

<Node gravity="0 -10 0" dt="0.02" >
	<RequiredPlugin pluginName='mSofaPlugin'/>
	<RequiredPlugin pluginName='mSofaPlugin-private'/>

	<VisualStyle displayFlags="showForceFields" />

	<include href="Topology.xml" />

	<EulerImplicitSolver />
	<IncomingSparseMatrix name="matrix" template="double" />
        <MShewchukPCGLinearSolver name="solver" matrix="@matrix" iterations="100" />

	<Node name="DeformArmadillo1">
		<TetrahedronSetTopologyContainer name="Container" nbPoints="@../Topology/Container.nbPoints" position="@../Topology/Container.position" tetrahedra="@../Topology/Container.tetrahedra" points="@../Topology/Container.points"/>

		<MechanicalObject name="mstate" />

		<UniformMass name="mass" totalMass="100" indices="@Container.points" />
 		<TetrahedronFEMForceField name="FEM" youngModulus="500" poissonRatio="0.4" />

		<BoxROI name="box" position="@Container.position" box="-2 7 -2   2 13 2" />
		<FixedConstraint name="fixed" indices="@box.indices" />
	</Node>

	<Node name="DeformArmadillo2">
		<TetrahedronSetTopologyContainer name="Container" nbPoints="@../Topology/Container.nbPoints" position="@../Topology/Container.position" tetrahedra="@../Topology/Container.tetrahedra" points="@../Topology/Container.points"/>

		<MechanicalObject name="mstate" dx="10" />

		<UniformMass name="mass" totalMass="100" indices="@Container.points" />
 		<TetrahedronFEMForceField name="FEM" youngModulus="500" poissonRatio="0.4" />

		<BoxROI name="box" position="@Container.position" box="-2 7 -2   2 13 2" />
		<FixedConstraint name="fixed" indices="@box.indices" />
	</Node>

</Node>
